# Задание 1 | Вариант 11
1*1/4 + 1/9 = 0.361111
# Задание 2
(0.125/0.25 + (1 + 9/16)/2.5)/((10 - 22/2.3)*0.46 + 1.6) + (17/20 + 1.9)*0.5 = 2
# Задание 3
k := 1.426
a := -1.220
p := 3.500
w := p^0.8 + a/(a - p) - sin(k^5/(k^5 - 1))^2 = 2.11123
# Задание 4
x := 8, 8.3 .. 10
y := 10, 7.5 .. 3
z := 1 .. 5
sin(2/(x + 25)) - 4 = [-3.93943; -3.93998; -3.94051; -3.94104; -3.94155; -3.94206; -3.94256]
# Задание 5
x := 2, 2.9 .. 12
f(x) := (x + 1)*e^(x + 2)
f(x) = [163.794; 523.73; 1585.44; 4630.71; 13188.1; 36860.8; 101542; 276513; 745931; 1996578; 5308961; 14037281]
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# Задание 6
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