# Вариант 3
# Задание №1
3*3/4 - 4/5 = 1.45
# Задание №2
((3*1/3 + 2.5)/(2.5 - 1/3)*(4.6 - 2*1/3)/(4.6 + 2*1/3)*5.2)/(0.05/(1/7 - 0.125) + 5.7) = 0.738049
# Задание №3
x := 3.251
y := 3.325
z := 0.466
(sin(z) + cos(2*x))/(2*x^5 + tan(x)) + nthroot(3*x + 2*y, 3) = 2.54279
# Задание №4
x := 5, 5.9 .. 7
y := -7, -8.6 .. -13
z := 7 .. 12
x^2 - 10*x + 2 = [-23; -22.19; -19.76]
# Задание №5
x := 2, 2.9 .. 12
f(x) := 5*x/(x^2 + 3)
f(x) = [1.42857; 1.27082; 1.08945; 0.936628; 0.814901; 0.718232; 0.640582; 0.577271; 0.524874; 0.480907; 0.443548; 0.411451]
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# Задание №6
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